i := 0 .. 14
shag := 2*π/28 = 0.224399
x[i] := -1*π + i*shag
sin(x[i]) = [0; -0.222521; -0.433884; -0.62349; -0.781831; -0.900969; -0.974928; -1; -0.974928; -0.900969; -0.781831; -0.62349; -0.433884; -0.222521; 0]
# Значения взяты из КОДА для БУТОМЫ
j := 0 .. 27
# Смещение 0 | Смещение 0 | Смещение 0
y1[j] := -1.7046*10^-5, 0.222, 0.433, 0.623, 0.781, 0.900, 0.974, 0.999, 0.974, 0.900, 0.781, 0.623, 0.433, 0.222, 1.7046*10^-5, -0.222, -0.433, -0.623, -0.781, -0.900, -0.974, -0.999, -0.974, -0.900, -0.781, -0.623, -0.433, -0.222
y2[j] := 0.866, 0.733, 0.563, 0.365, 0.149, -0.074, -0.294, -0.500, -0.680, -0.826, -0.930, -0.988, -0.997, -0.955, -0.866, -0.733, -0.563, -0.365, -0.149, 0.074, 0.294, 0.500, 0.680, 0.826, 0.930, 0.988, 0.997, 0.955
y3[j] := -0.866, -0.955, -0.997, -0.988, -0.930, -0.826, -0.680, -0.500, -0.294, -0.074, 0.149, 0.365, 0.563, 0.733, 0.866, 0.955, 0.997, 0.988, 0.930, 0.826, 0.680, 0.500, 0.294, 0.074, -0.149, -0.365, -0.563, -0.733
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